Sp := 150000  # mm^2  # Площадь теплообмена радиатора
h := 30  # mm  # Высота ребра радиатора
w := 2  # mm  # Толщина ребра радиатора
d := 5  # mm  # Толщина основания плиты радиатора
l := 100  # mm  # Ширина радиатора
b := 0.3*h  # Расстояние между ребрами радиатора
H := h + d  # Общая высота радиатора
Sa := 2*((l + w)*(h + d) + l*(b + d) + b*d) - d*l
Sb := 2*((l + w)*(h + d) + l*w) - d*l
n := (Sp - Sb)/Sa + 1 - 1  # Количество ребер радиатора
L := (n - 1)*(b + w) + w  # Длина радиатора
b = 9
n = 15.001
H = 35
