Sp := in0  # mm^2  # Площадь теплообмена радиатора
# Памятка:
# W2=b=out0
# L=l=in4
# N=n=out1
# H2=h=in1
# W1=w=in2
# H1=H=out2
#
# in0=150000
# in1=30
# in=2
# in3=5
# in4=100
h := in1  # mm  # Высота ребра радиатора
w := in2  # mm  # Толщина ребра радиатора
d := in3  # mm  # Толщина основания плиты радиатора
l := in4  # mm  # Ширина радиатора
b := 0.3*h  # Расстояние между ребрами радиатора
H := h + d  # Общая высота радиатора
Sa := 2*((l + w)*(h + d) + l*(b + d) + b*d) - d*l
Sb := 2*((l + w)*(h + d) + l*w) - d*l
n := (Sp - Sb)/Sa + 1 - 1  # Количество ребер радиатора
L := (n - 1)*(b + w) + w  # Длина радиатора
out0 := b
out1 := n
out2 := H
