# Рассчитать антенну поверхностных волн (рис. 1, а) с замед-
# ляющей структурой (направителем 2) в виде прямоугольных канавок
# при средней волне рабочего диапазона λ = 3 см и возбуждения структу-
# ры рупором 1, раскрыв которого имеет ширину а = 30 мм. КНД антен-
# ны D0 должен быть не менее 34.
λ := 6  # см
a := 35
D := 30
la := D*λ/(4*sqrt(8))
la = 15.9099  # -Длина замедляющей структуры
ξопт := 1 + λ/(2*la)
ξопт = 1.18856
ξопт := 1.15
s := 0.05*λ
t := s
t = 0.3
x := (ξопт^2 - 1)/(t/(s + t))^2
x = 1.29
h := atan(x)*λ/360
h = 0.0151894  # см
# Рассчитать пирамидальный рупор (рис. 2, в), который при
# возбуждении прямоугольным волноводом R 100 (МЭК-100) с размерами
# a на b = 23 на 10 мм имеет на волне длина волны = 3 см коэффициент усиления 40
# (16дБ).
a := 23
b := 10
G := 40
Sa := G*λ^2/6
Sa = 240
b1 := sqrt(0.8*Sa)
b1 = 13.8564
a1 := b1/0.8
a1 = 17.3205
RH := a1^2/(3*λ)
RH = 16.6667
l := sqrt(RH^2 + (a1/2)^2)
l = 18.7824
